*Heading
** Job name: Heat_Job Model name: Contact_Test
** Generated by: Abaqus/CAE 6.14-2
*Preprint, echo=NO, model=NO, history=NO, contact=NO
**
** PARTS
**
*Part, name=Block-1
*End Part
**
*Part, name=Block-2
*End Part
**
**
** ASSEMBLY
**
*Assembly, name=Assembly
**
*Instance, name=Block-1-1, part=Block-1
*Node
      1,           0.,  0.275000006,          0.5
      2,           0.,         0.25,          0.5
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*Element, type=DC3D8
   1,  442,  443,  464,  463,    1,    2,   23,   22
   2,  443,  444,  465,  464,    2,    3,   24,   23
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*Nset, nset=_PickedSet2, internal, generate
    1,  9261,     1
*Elset, elset=_PickedSet2, internal, generate
    1,  8000,     1
** Section: IN718_Section
*Solid Section, elset=_PickedSet2, material=IN718
,
*End Instance
**
*Instance, name=Block-2-1, part=Block-2
          0.,      -0.0125,         -0.6
*Node
      1,           0.,  0.287499994,  0.600000024
      2,           0.,  0.258088231,  0.600000024
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*Element, type=DC3D8
   1,  379,  380,  398,  397,    1,    2,   20,   19
   2,  380,  381,  399,  398,    2,    3,   21,   20
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*Nset, nset=_PickedSet2, internal, generate
    1,  6804,     1
*Elset, elset=_PickedSet2, internal, generate
    1,  5780,     1
** Section: IN718_Section
*Solid Section, elset=_PickedSet2, material=IN718
,
*End Instance
**
*Nset, nset=All_Set, instance=Block-1-1, generate
    1,  9261,     1
*Nset, nset=All_Set, instance=Block-2-1, generate
    1,  6804,     1
*Elset, elset=All_Set, instance=Block-1-1, generate
    1,  8000,     1
*Elset, elset=All_Set, instance=Block-2-1, generate
    1,  5780,     1
*Elset, elset=boxSectionSet, instance=Block-1-1, generate
   2,  152,    1
*Elset, elset=test_element_set, instance=Block-2-1
  154,  155,  156,  157,  158,  159
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*Nset, nset=_PickedSet40, internal, instance=Block-1-1, generate
    1,  9261,     1
*Nset, nset=_PickedSet40, internal, instance=Block-2-1, generate
    1,  6804,     1
*Elset, elset=_PickedSet40, internal, instance=Block-1-1, generate
    1,  8000,     1
*Elset, elset=_PickedSet40, internal, instance=Block-2-1, generate
    1,  5780,     1
*Nset, nset=_PickedSet58, internal, instance=Block-1-1, generate
    1,  9241,    21
*Elset, elset=_PickedSet58, internal, instance=Block-1-1, generate
    1,  7981,    20
*Elset, elset=_Heat_Flux_Surface_S2, internal, instance=Block-1-1, generate
   1,  400,    1
*Surface, type=ELEMENT, name=Heat_Flux_Surface
_Heat_Flux_Surface_S2, S2
*Elset, elset=_Radiation_Surface_S1, internal, instance=Block-1-1, generate
 7601,  8000,     1
*Elset, elset=_Radiation_Surface_S6, internal, instance=Block-1-1, generate
    1,  7981,    20
*Elset, elset=_Radiation_Surface_S6, internal, instance=Block-2-1, generate
    1,  5764,    17
*Elset, elset=_Radiation_Surface_S4, internal, instance=Block-1-1, generate
   20,  8000,    20
*Elset, elset=_Radiation_Surface_S3, internal, instance=Block-1-1
    1,    2,    3,    4,    5,    6
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*Surface, type=ELEMENT, name=Radiation_Surface
_Radiation_Surface_S1, S1
_Radiation_Surface_S6, S6
_Radiation_Surface_S4, S4
_Radiation_Surface_S3, S3
*Elset, elset=__PickedSurf42_S5, internal, instance=Block-1-1
  381,  382,  383,  384,  385,  386
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*Surface, type=ELEMENT, name=_PickedSurf42, internal
__PickedSurf42_S5, S5
*Elset, elset=__PickedSurf43_S3, internal, instance=Block-2-1
    1,    2,    3,    4,    5,    6
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*Surface, type=ELEMENT, name=_PickedSurf43, internal
__PickedSurf43_S3, S3
*End Assembly
*Amplitude, name=Heat_Transfer_Amp, time=TOTAL TIME
             0.,              0.,             0.5,              1.,             10.,              1.,             20.,              0.
            75.,              0.
**
** MATERIALS
**
*Material, name=IN718
*Conductivity
30.,
*Density
7850.,
*Specific Heat
720.,
**
** INTERACTION PROPERTIES
**
*Surface Interaction, name="Heat Contact"
1.,
*Gap Conductance
300.,    0.
  0., 1e-06
**
** PHYSICAL CONSTANTS
**
*Physical Constants, absolute zero=0., stefan boltzmann=5.67037e-08
**
** PREDEFINED FIELDS
**
** Name: Predefined Heat   Type: Temperature
*Initial Conditions, type=TEMPERATURE
_PickedSet40, 500.
**
** INTERACTIONS
**
** Interaction: Surface_Contact
*Contact Pair, interaction="Heat Contact", type=SURFACE TO SURFACE
_PickedSurf43, _PickedSurf42
** ----------------------------------------------------------------
**
** STEP: Heat_Transfer
**
*Step, name=Heat_Transfer, nlgeom=NO, inc=2000
*Heat Transfer, end=SS, deltmx=100.
0.01, 50., 0.001, 1., 0.01
**
** BOUNDARY CONDITIONS
**
** Name: BC-1 Type: Temperature
*Boundary
_PickedSet58, 11, 11, 750.
**
** LOADS
**
** Name: Heat_Flux   Type: Surface heat flux
*Dsflux, amplitude=Heat_Transfer_Amp
Heat_Flux_Surface, S, 5e+06
**
** INTERACTIONS
**
** Interaction: Deactivate_Element
*Model Change, remove
test_element_set,
** Interaction: Python_Test
*Model Change, remove
test_element_set,
** Interaction: Surface_Radiation
*Sradiate
Radiation_Surface, R, 1000., 0.06
**
** OUTPUT REQUESTS
**
*Restart, write, frequency=0
**
** FIELD OUTPUT: F-Output-1
**
*Output, field, variable=PRESELECT
*Output, history, frequency=0
*End Step
